# Calcul temps une instruction  (2 fois temps oscillateur) :
f_osc := 0.00001 MHz
1/f_osc = 100000000 ns
T_cy := (1/f_osc)*2 = 200000000 ns  # (Internal Intruction Cycle clock Fcy)
# Calcul période PWM :
f_GaN := 6.78 MHz
Period_GaN := 1/f_GaN = 147.493 ns
# Calcul sortie PLL "FPLLO" :
f_FRC := 8 MHz
f_PLL_I := f_FRC = 8 MHz
PLL_FB_DIV := 150
PLL_PRE := 1
POST1_DIV := 1/2
POST2_DIV := 1
f_PLL_O := f_PLL_I*(PLL_FB_DIV/(PLL_PRE*POST1_DIV*POST2_DIV)) = 2.4 GHz
# Fréquence oscillateur interne et processeur :
f_osc := f_PLL_O/2 = 1.2 GHz
fp := f_osc/2 = 600 MHz
# (system clock)
# f_cy : Internal Instruction Cycle clock Frequency :
DOZE := 1/8
f_cy := fp*DOZE = 75 MHz
75 MHz*8 = 600 MHz
# I2C Baud Rate
f_SCL := 100 kHz
delay := 110 ns
I2CxBRG := ((1/(2*f_SCL) - delay)*fp) - 2 = 2932
(1/(2*f_SCL) - delay)*100 MHz = 489
# (OK datasheet table 18-1 si fp = 100 MHz (DOOZE = 1))
