# Calcul temps une instruction  (2 fois temps oscillateur) :
f_osc := 32 MHz
1/f_osc = 31.25 ns  # (avec f_usb = 48 MHz)
f_cy := f_osc/2 = 16 MHz  # (ou Fosc/2 dans datasheet)
T_cy := 1/f_cy = 62.5 ns
# I2C Baud Rate
f_SCL := 100 kHz
delay := 110 ns
I2CxBRG := f_cy/f_SCL - f_cy/(10*10^6 Hz) - 1 = 157.4
I2C1BRG := 9
(1/(2*f_SCL) - delay)*100 MHz = 489
# (OK datasheet table 18-1 si fp = 100 MHz (DOOZE = 1))
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# Calcule "DIE_TEMP" :
tm_digital := 13412
die_temp := (tm_digital - 12010)/45.6 = 30.7456
# Calcule "R_NTC" :
tm_digital := 10895
r_ntc := 10*10^3*(tm_digital/(21845 - tm_digital)) = 9949.77
# Calcule Input I limit :
µV := 10^-6 V
mΩ := 10^-3 Ω
Iin_limit_setting := 63
R_SNS_I := 32 mΩ
I_in_limit := (Iin_limit_setting + 1)*500*µV/R_SNS_I = 1 A
4 V*1.7 A = 6.8 W
10 W/(15 V) = 0.666667 A
# UVCLFB (Pin 8): Undervoltage Current Limit Feedback Pin :
VDD := 30 V
R10 := 47 kΩ
R11 := 4.12 kΩ
VDD*R11/(R11 + R10) = 2.41784 V
# Maximum charge current is tapered off when this pin is below 1.2V, at 1.15V the charge current is zero.
#
# If the input undervoltage current limit feature is not desired, connect UVCLFB to 2P5VCC through a 10k resistor
#
# or to VIN through an appropriately sized resistor.
