# Calcul temps une instruction  (2 fois temps oscillateur) :
f_osc := 133.164 MHz
1/f_osc = 7.50954 ns
T_cy := (1/f_osc)*2 = 15.0191 ns  # (Internal Intruction Cycle clock Fcy)
# Calcul période PWM :
f_GaN := 6.78 MHz
Period_GaN := 1/f_GaN = 147.493 ns
Timer_prescale := 1
PR5 := Period_GaN/(T_cy*Timer_prescale) - 1 = 8.82035
PR5 := 8  # (Timer5 Period Register)
PWM_period := (PR5 + 1)*T_cy*Timer_prescale = 135.172 ns
f_PWM := 1/PWM_period = 7.398 MHz
# Resolution :
max_PWM_res := log(f_osc/(f_PWM*Timer_prescale))/log(2) = 4.16993
# Calcul temps ON/OFF min :
1/(6.78 MHz) = 147.493 ns
1/(40 MHz) = 25 ns
147.5*0.3 = 44.25
# Calculs pour avoir f_osc à 133.33 MHz :
Tcy := 15 ns
f_osc := 1/Tcy*2 = 133.333 MHz
f_FRC := 7.37 MHz
# (hypo : x2 pour f_osc)
PLLPOST := 0
PLLPRE := 0
M := 72  # (M imposé par hypo)
N2 := 2*(PLLPOST + 1) = 2
N1 := PLLPRE + 2 = 2
f_vco := 2*f_osc = 266.667 MHz
fin := f_vco*N1/M = 7.40741 MHz
7.407 MHz - 7.398 MHz = 9 kHz
f_FRC + (f_FRC*0.375/100*1) = 7.39764 MHz
# Vérification Calcul :
fin := 7.398 MHz
# (avec TUN<5:0> = 0x01)
M = 72
N1 = 2
f_vco := fin*(M/N1) = 266.328 MHz
f_osc := fin*(M/(N1*N2)) = 133.164 MHz
f_cy := f_osc/2 = 66.582 MHz
t_cy := 1/f_cy = 15.0191 ns
# Calcul T_PWM, duty cycle :
f_PWM := 6.78 MHz
T_PWM := 1/f_PWM = 147.493 ns
D := 0.5
t_pulse := T_PWM*D = 73.7463 ns
OCxRS := t_pulse/t_cy = 4.91018
