# Calcul temps une instruction  (2 fois temps oscillateur) :
f_osc := 0.00001 MHz
1/f_osc = 100000000 ns
T_cy := (1/f_osc)*2 = 200000000 ns  # (Internal Intruction Cycle clock Fcy)
# Calcul période PWM :
f_GaN := 6.78 MHz
Period_GaN := 1/f_GaN = 147.493 ns
# Calcul sortie PLL "FPLLO" :
f_FRC := 8 MHz
f_PLL_I := f_FRC = 8 MHz
PLL_FB_DIV_old := 150
PLL_PRE := 1
POST1_DIV := 1/2
POST2_DIV := 1
PLL_FB_DIV := 125
f_PLL_O := f_PLL_I*(PLL_FB_DIV/(PLL_PRE*POST1_DIV*POST2_DIV)) = 2 GHz
# Fréquence oscillateur interne et processeur :
f_osc := f_PLL_O/2 = 1 GHz
fp := f_osc/2 = 500 MHz
# (system clock)
# f_cy : Internal Instruction Cycle clock Frequency :
DOZE := 1/8
f_cy := fp*DOZE = 62.5 MHz
# Calculs Timer1 :
µs := 10^-6 s
f_timer_in := 8 MHz
timer_pre := 64
# (FRC : Timer1 Extended Clock Select bits) | (Timer1 Input Clock Prescale Select bits)
t_timer_res := 1/f_timer_in*timer_pre = 8e-6 s
PR1 := 62499
# (timer time resolution)
timer_period := t_timer_res*PR1 = 0.499992 s
# Calcul Duty Cycle :
PG5PER := 3992
D := 0.5  # (T_pwm = 1 µs ; Duty Cycle = 50%)
PG5DC := (PG5PER + 8)*D = 2000
32/(PG5PER + 8) = 0.008
